<?xml version="1.0" ?>
<Node name="root" dt="0.02" showBoundingTree="0" gravity="0 -9.81 0">
    <RequiredPlugin name="Sofa.Component.Collision.Detection.Algorithm"/>
    <RequiredPlugin name="Sofa.Component.Collision.Detection.Intersection"/>
    <RequiredPlugin name="Sofa.Component.Collision.Geometry"/>
    <RequiredPlugin name="Sofa.Component.Collision.Response.Contact"/>
    <RequiredPlugin name="Sofa.Component.Constraint.Projective"/>
    <RequiredPlugin name="Sofa.Component.IO.Mesh"/>
    <RequiredPlugin name="Sofa.Component.LinearSolver.Iterative"/>
    <RequiredPlugin name="Sofa.Component.Mapping.Linear"/>
    <RequiredPlugin name="Sofa.Component.Mass"/>
    <RequiredPlugin name="Sofa.Component.MechanicalLoad"/>
    <RequiredPlugin name="Sofa.Component.ODESolver.Backward"/>
    <RequiredPlugin name="Sofa.Component.SolidMechanics.FEM.Elastic"/>
    <RequiredPlugin name="Sofa.Component.StateContainer"/>
    <RequiredPlugin name="Sofa.Component.Topology.Container.Dynamic"/>
    <RequiredPlugin name="Sofa.Component.Topology.Mapping"/>
    <RequiredPlugin name="Sofa.Component.Visual"/>
    <RequiredPlugin name="Sofa.GL.Component.Rendering3D"/>

    <DefaultAnimationLoop />
    <CollisionPipeline verbose="0" />
    <BruteForceBroadPhase/>
    <BVHNarrowPhase/>
    <CollisionResponse response="PenalityContactForceField" />
    <MinProximityIntersection name="Proximity" alarmDistance="1.0" contactDistance="0.5" />

    <Node name="Sandbag">
        <EulerImplicitSolver name="odesolver" rayleighStiffness="0.1" rayleighMass="0.1" />
        <CGLinearSolver name="linear solver" iterations="25" tolerance="1.0e-9" threshold="1.0e-9" />
        <MeshGmshLoader name="loader" filename="mesh/sandbag.msh" />
        <MechanicalObject src="@loader" name="Volume" scale3d="50 50 50" />
        <TetrahedronSetTopologyContainer name="TetraContainer" position="@Volume.position" src="@loader" tags=" " />
        <TetrahedronSetTopologyModifier name="Modifier" />
        <TetrahedronSetGeometryAlgorithms name="GeomAlgo" template="Vec3d" />

        <DiagonalMass massDensity="1.0" />
        <FixedConstraint name="FixedEnd" indices="1 4 5 8" />
        <TetrahedronFEMForceField name="FEM" youngModulus="800" poissonRatio="0.3" computeGlobalMatrix="false" method="large" topology="@TetraContainer" />
        <PlaneForceField normal="0 1 0" d="0" stiffness="100000" showPlane="1" showPlaneSize="30" />

        <Node name="SandbagSurface">
            <TriangleSetTopologyContainer name="TriContainer" fileTopology="" tags=" " />
            <TriangleSetTopologyModifier name="Modifier" />
            <TriangleSetGeometryAlgorithms name="GeomAlgo" template="Vec3d" />
            <Tetra2TriangleTopologicalMapping input="@../TetraContainer" output="@TriContainer" />
            <TriangleCollisionModel />
            <Node name="SandbagVisu">
                <OglModel name="Visual" color="0.6 0.45 0.2" />
                <IdentityMapping input="@../../Volume" output="@Visual" />
            </Node>
        </Node>
    </Node>
</Node>
